*Heading
** Job name: Job-CF-R-E1_E2_100 Model name: Model-1
** Generated by: Abaqus/CAE 2017
*Preprint, echo=NO, model=NO, history=NO, contact=NO
**
** PARTS
**
*Part, name=A65C
*End Part
**
**
** ASSEMBLY
**
*Assembly, name=Assembly
**
*Instance, name=A65C-1, part=A65C
*Node
      1,  -281.326843,  -321.894012,  -44.8245659
      2,  -284.412964,  -322.388794,   -41.115345
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*Element, type=STRI65
 1,    1,    2,   26, 6493, 6494, 6495
 2,   26,   37,    1, 6496, 6497, 6495
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*Nset, nset=Primary_Axis_Region
    5,    6, 6525
*Elset, elset=Primary_Axis_Region
   16, 9541
*Elset, elset=_Normal_Axis_Region_SPOS, internal, generate
     1,  12877,      1
*Surface, type=ELEMENT, name=Normal_Axis_Region
_Normal_Axis_Region_SPOS, SPOS
*Distribution, name=Ori-1-DiscOrient, location=ELEMENT, Table=Ori-1-DiscOrient_Table
** Description: Distribution generated from Discrete Orientation
,           1.,           0.,           0.,           0.,           1.,           0.
1, -0.386017560958862, -0.828153610229492, -0.406388968229294, -0.628912091255188, -0.0860304683446884, 0.772701919078827
2, -0.386017560958862, -0.828153610229492, -0.406388968229294, -0.628912091255188, -0.0860304683446884, 0.772701919078827
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12877, -0.687479257583618, -0.0254476107656956, -0.725758016109467, 0.726204037666321, -0.0240906197577715, -0.687057077884674
*Orientation, name=Ori-1, system=RECTANGULAR
Ori-1-DiscOrient
3, 0.
** Region: (Layup-CF-R-E1_E2_100-1: Generated From Layup)
*Elset, elset=Layup-CF-R-E1_E2_100-1, generate
     1,  12877,      1
** Section: Layup-CF-R-E1_E2_100-1
*Shell Section, elset=Layup-CF-R-E1_E2_100-1, composite, orientation=Ori-1, offset=SPOS, layup=Layup-CF-R-E1_E2_100
5., 3, CF-R-E1_E2_100, 0., Ply-1
*End Instance
**
*Nset, nset=BC-Edges, instance=A65C-1
     4,     6,    22,    23,    25,   715
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*Elset, elset=BC-Edges, instance=A65C-1
    16,  6344,  6355,  6365,  6408,  6431
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*Nset, nset=BC_edges_extra, instance=A65C-1
     4,     5,     6,    22,    23,    25
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*Elset, elset=BC_edges_extra, instance=A65C-1
    16,  6344,  6355,  6365,  6408,  6431
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*Nset, nset=BC_edges_single, instance=A65C-1
    5,    6, 6525
*Elset, elset=BC_edges_single, instance=A65C-1
   16, 9541
*Nset, nset=PROFILE-R_5, instance=A65C-1
     1,     2,    16,   135,   136,   137
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*Elset, elset=PROFILE-R_5, instance=A65C-1
     1,    30,   666,   668,   670,   672
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*Nset, nset=PROFILE-R_6, instance=A65C-1
     7,     8,    15,    80,    81,    82
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*Elset, elset=PROFILE-R_6, instance=A65C-1
   17,   31,   65,   67,   69,   71
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*Nset, nset=PROFILE-R_7, instance=A65C-1
     9,    10,    17,   184,   185,   186
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*Elset, elset=PROFILE-R_7, instance=A65C-1
   44, 1366, 1368, 1370, 1372, 1374
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*Elset, elset=_Surf-1_SPOS, internal, instance=A65C-1, generate
     1,  12877,      1
*Surface, type=ELEMENT, name=Surf-1
_Surf-1_SPOS, SPOS
*End Assembly
*Distribution Table, name=Ori-1-DiscOrient_Table
coord3D, coord3D
**
** MATERIALS
**
*Material, name=CF-R-E1_E2_100
*Elastic, type=ENGINEERING CONSTANTS
140000., 1400.,10000.,  0.02,   0.3,   0.3, 3500., 3300.
 3300.,
**
** BOUNDARY CONDITIONS
**
** Name: BC-1 Type: Displacement/Rotation
*Boundary
BC-Edges, 1, 1
BC-Edges, 2, 2
BC-Edges, 3, 3
BC-Edges, 4, 4
BC-Edges, 5, 5
BC-Edges, 6, 6
** ----------------------------------------------------------------
**
** STEP: Step-1
**
*Step, name=Step-1, nlgeom=NO
*Static
0.001, 1., 1e-05, 0.1
**
** LOADS
**
** Name: Load-1   Type: Pressure Using Field: AnalyticalField-1
*Dload
A65C-1.1, P, 0.0369954
A65C-1.2, P, 0.0595862
A65C-1.3, P, 0.050072
A65C-1.4, P, 0.0534359
A65C-1.5, P, 0.0223359
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A65C-1.12877, P, 0.128542
**
** OUTPUT REQUESTS
**
*Restart, write, frequency=0
**
** FIELD OUTPUT: F-Output-1
**
*Output, field, variable=PRESELECT
**
** HISTORY OUTPUT: H-Output-1
**
*Output, history, variable=PRESELECT
*End Step
